*Heading
 test
** Job name: Job-1 Model name: Model-1
** Generated by: Abaqus/CAE Student Edition 2017
*Preprint, echo=NO, model=NO, history=NO, contact=NO
**
** PARTS
**
*Part, name=Part-1
*Node
      1,           1.,           0.,   1.60000002
      2,   0.99619472, 0.0871557444,   1.60000002
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*Element, type=C3D8R
 1, 120, 121, 128, 127,   1,   2,   9,   8
 2, 121, 122, 129, 128,   2,   3,  10,   9
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*Nset, nset=Set-1, generate
   1,  238,    1
*Elset, elset=Set-1, generate
  1,  96,   1
** Section: test
*Solid Section, elset=Set-1, material=Material-1
,
*End Part
**
**
** ASSEMBLY
**
*Assembly, name=Assembly
**
*Instance, name=Part-1-1, part=Part-1
*End Instance
**
*Nset, nset=Set-1, instance=Part-1-1
   1,   7,   8,  14,  15,  21
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*Elset, elset=Set-1, instance=Part-1-1
  1,  6,  7, 12, 13, 18
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*Nset, nset=Set-2, instance=Part-1-1
   1,   2,   3,   4,   5,   6
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*Elset, elset=Set-2, instance=Part-1-1
  1,  2,  3,  4,  5,  6, 91, 92, 93, 94, 95, 96
*Elset, elset=_Surf-1_S2, internal, instance=Part-1-1, generate
  1,  96,   1
*Surface, type=ELEMENT, name=Surf-1
_Surf-1_S2, S2
*Nset, nset=_T-cyl, internal
Set-1,
Set-2,
*Transform, nset=_T-cyl, type=C
          0.,           0.,           0.,           0.,           0.,           1.
*End Assembly
**
** MATERIALS
**
*Material, name=Material-1
*Elastic
196000., 0.3
** ----------------------------------------------------------------
**
** STEP: Step-1
**
*Step, name=Step-1, nlgeom=YES
test
*Static
1., 1., 1e-05, 1.
**
** BOUNDARY CONDITIONS
**
** Name: BC-1 Type: Displacement/Rotation
*Boundary
Set-1, 2, 2
** Name: BC-2 Type: Displacement/Rotation
*Boundary
Set-2, 3, 3
**
** LOADS
**
** Name: Load-1   Type: Pressure
*Dsload
Surf-1, P, 100.
**
** OUTPUT REQUESTS
**
*Restart, write, frequency=0
**
** FIELD OUTPUT: F-Output-1
**
*Output, field, variable=PRESELECT, number interval=100
**
** HISTORY OUTPUT: H-Output-1
**
*Output, history, variable=PRESELECT
*End Step
